N := 9
x := [10; -1; 10; -1; 10; -1; 10; -1; 0]
h := [-1; -2; 0; 0; 0; 0; 0; 0; 0]
h(n) := h[mod(n, N)]
x(n) := x[mod(n, N)]
x1(n) := x(n)
h1(n) := h(n)
X1(k) := sum(x1(n)*(cos(2*π*k*n/N) - sin(2*π*k*n/N)*1i), n = 0 .. N - 1)
H1(k) := sum(h1(n)*(cos(2*π*k*n/N) - sin(2*π*k*n/N)*1i), n = 0 .. N - 1)
X1(0) = 36
H1(0) = -3
H1(1) = -2.53209 + 1.28558i
X1(1) = -2.16044 - 4.42604i
H1(2) = -1.3473 + 1.96962i
X1(2) = 3.76352 - 5.23303i
X1(3) = 10.5 + 0.866025i
H1(3) = 1.73205i
X1(4) = 14.8969 + 27.7718i
H1(4) = 0.879385 + 0.68404i
X1(5) = 14.8969 - 27.7718i  # ((СВЁРТКА!)!)!
H1(5) = 0.879385 - 0.68404i
X1(6) = 10.5 - 0.866025i
H1(6) = -1.73205i
X1(7) = 3.76352 + 5.23303i
H1(7) = -1.3473 - 1.96962i
X1(8) = -2.16044 + 4.42604i
H1(8) = -2.53209 - 1.28558i
parseval_left := N^-1*sum(|X1(k)|^2, k = 0 .. N - 1)
parseval_rigth := sum(x1(k)^2, k = 0 .. N - 1)
rez1 := X1(0)*H1(0)
rez1 = -108
parseval_left = 404
rez2 := X1(1)*H1(1)
rez2 = 11.1604 + 8.42971i
rez3 := X1(2)*H1(2)
rez3 = 5.23648 + 14.4631i
parseval_rigth = 404
rez4 := X1(3)*H1(3)
rez4 = -1.5 + 18.1865i
rez5 := X1(4)*H1(4)
rez5 = -5.89693 + 34.6123i
rez6 := X1(5)*H1(5)
rez6 = -5.89693 - 34.6123i
rez7 := X1(6)*H1(6)
rez7 = -1.5 - 18.1865i
rez8 := X1(7)*H1(7)
rez8 = 5.23648 - 14.4631i
rez9 := X1(8)*H1(8)
rez9 = 11.1604 - 8.42971i
ODPF := [
    -108;
    11.16 + 8.43i;
    5.236 + 14.463i;
    -1.5 + 18.187i;
    -5.897 + 34.612i;
    -5.897 - 34.612i;
    -1.5 - 18.187i;
    5.236 - 14.463i;
    11.16 - 8.43i
]
odpf(n) := ODPF[mod(n, N)]
X1(n) := odpf(n)
x1(n) := N^-1*sum(X1(k)*(cos(2*π*k*n/N) + sin(2*π*k*n/N)*1i), k = 0 .. N - 1)
x1(6) = -7.99986
x1(0) = -10.0002
x1(3) = -18.9999
x1(7) = -18.9999
x1(1) = -19.0002
x1(4) = -8.00018
x1(2) = -7.99993
x1(5) = -18.9998
x1(8) = 2.00001 - 2.53131e-14i
