P1010 := 1
P1001 := 1
P2110 := 1
P1111 := 1
P0110 := 1
P2000 := 1
P2010 := 1
P1001 := 1
P1011 := 1
P1110 := 1
P1000 := 1
P1001 := 1
P2011 := 1
P2111 := 1
P0111 := 1
Given
P2000 == 0
P1000 == 0
P1010 == P2010*0.55 + P2011*0.28
P2010 == P1000*1 + P1001*0.5 + P1011*0.23
P1001 == P2010*0.45 + P2011*0.45
P2011 == P1010*0.45 + P1001*0.5 + P1011*0.23 + P0110*0.45
P2110 == P1010*0.55 + P1011*0.28
P1011 == P2011*0.28 + P2110*0.45 + P2111*0.45
P2111 == P1011*0.28 + P1111*0.45 + P1110*0.45 + P0111*0.45
P1111 == P2110*0.28
P1110 == P2110*0.55 + P2111*0.28
P0111 == P1111*0.28 + P0111*0.28
P0110 == P1111*0.28 + P1110*0.55 + P0111*0.28 + P0110*0.55
P2000 + P1000 + P1010 + P2010 + P1001 + P2011 + P2110 + P1011 + P2111 + P1111 + P1110 + P0111 + P0110 == 1
Find(P1010) =  # error: Эта переменная неопределена.
