p := 0.5
p_1 := 0.6
p_2 := 0.8
Given
P_000 == P_000*p + P_001*p*(1 - p_2) + P_010*p*(1 - p_1) + P_011*p*(1 - p_1)*(1 - p_2)
P_010 == P_000*(1 - p) + P_010*(p*p_1 + (1 - p)*(1 - p_1)) + P_111*p*(1 - p_1)*(1 - p_2) + P_001*(1 - p)*(1 - p_2) + P_011*(p*p_1*(1 - p_2) + (1 - p)*(1 - p_1)*(1 - p_2))
P_001 == P_001*p*p_2 + P_011*p*(1 - p_1)*p_2
P_111 == P_111*(p_1*p_2 + (1 - p)*(1 - p_1)*p_2 + (1 - p)*p_1*(1 - p_2)) + P_011*(1 - p)*p_1*p_2
P_000 + P_010 + P_011 + P_001 + P_111 == 1
[P_000; P_010; P_011; P_001; P_111] := Find(P_000, P_010, P_011, P_001, P_111) → [0.133406232914; 0.231000546747; 0.307545106616; 0.0820120284308; 0.246036085293]
P_011 == P_010*p_1*(1 - p) + P_001*(1 - p)*p_2 + P_011*(p*p_1*p_2 + (1 - p)*p_1*(1 - p_2) + (1 - p)*(1 - p_1)*p_2) + P_111*(p*(1 - p_1)*p_2 + p*p_1*(1 - p_2) + (1 - p)*(1 - p_1)*(1 - p_2))
K_1 := P_010 + P_011 + P_111 = 0.784582
K_2 := P_011 + P_001 + P_111 = 0.635593
P_отк := P_111*(1 - p)*p_1*p_2 = 0.0590487
