x1 := 1
x2 := 1
x3 := 1
x4 := 1
x5 := 1
x6 := 1
x7 := 1
x8 := 1
x9 := 1
x10 := 1
x11 := 1
x12 := 1
x13 := 1
x14 := 1
x15 := 1
x16 := 1
Given
0 == 0.6*x10 - x3
0 == 0.4*x10 + 0.6*x11 + 0.6*x12 - x4
0 == 0.4*x11 + 0.24*x12 - x5
0 == 0.16*x12 + 0.6*x13 + 0.6*x16 - x6
0 == 0.24*x13 + 0.4*x14 + 0.24*x15 + 0.4*x16 - x7
0 == 0.16*x13 + 0.6*x14 + 0.76*x15 - x8
0 == 0.6*x3 + 0.6*x4 - x10
0 == 0.4*x3 + 0.24*x4 - x11
0 == 0.16*x4 + 0.6*x5 + 0.6*x6 - x12
0 == 0.16*x6 + 0.6*x7 + 0.6*x8 - x13
0 == 0.4*x7 + 0.24*x8 - x14
0 == 0.16*x8 - x15
0 == 0.4*x5 + 0.6*x6 - x16
x3 + x4 + x5 + x6 + x7 + x8 + x10 + x11 + x12 + x13 + x14 + x15 + x16 == 1
Minerr(x3, x4, x5, x6, x7, x8, x10, x11, x12, x13, x14, x15, x16) = [0.101678; 0.18659; 0.0588527; 0.0860859; 0.0443347; 0.0152897; 0.171693; 0.0838071; 0.114991; 0.0464142; 0.0185405; -0.000416568; 0.0720584]
