x1 := 0
x2 := 0
x3 := 0
x4 := 0
x5 := 0
x6 := 0
x7 := 0
x8 := 0
x9 := 0
x10 := 0
Given
x1 == 0.5*x1 + 0.2*x2 + 0.25*x3 + 0.1*x4 + 0.25*x7 + 0.1*x8
x2 == 0.3*x2 + 0.15*x4 + 0.15*x8
x3 == 0.25*x3 + 0.1*x4 + 0.1*x5 + 0.25*x7 + 0.1*x8 + 0.1*x9
x4 == 0.15*x4 + 0.25*x5 + 0.1*x6 + 0.15*x8 + 0.25*x9 + 0.1*x10
x5 == 0.15*x5 + 0.25*x6 + 0.15*x9 + 0.25*x10
x6 == 0.15*x6 + 0.15*x10
x7 == 0.5*x1 + 0.2*x2 + 0.25*x3 + 0.1*x4 + 0.25*x7 + 0.1*x8
x8 == 0.3*x2 + 0.25*x3 + 0.25*x4 + 0.1*x5 + 0.25*x7 + 0.25*x8 + 0.1*x9
x9 == 0.15*x4 + 0.25*x5 + 0.1*x6 + 0.15*x8 + 0.25*x9 + 0.1*x10
x10 == 0.15*x5 + 0.4*x6 + 0.15*x6 + 0.15*x9 + 0.4*x10
x1 + x2 + x3 + x4 + x5 + x6 + x7 + x8 + x9 + x10 == 1
Find(x1, x2, x3, x4, x5, x6, x7, x8, x9, x10) = [0.253002; 0.048445; 0.123885; 0.0540447; 0.0166841; 0.00361263; 0.253001; 0.172382; 0.0540439; 0.0209004]
