P2000 := 0
P2001 := 0
P2011 := 0
P2100 := 0
P2101 := 0
P2111 := 0
P1000 := 0
P1001 := 0
P1011 := 0
P1100 := 0
P1101 := 0
P1111 := 0
Given
P2000 == 0
P2001 == 0
P2011 == 0
P2100 == 1*P1000 + 0.5*P1001 + 0.2*P1100 + 0.1*P1101
P2101 == 0.5*P1001 + 0.5*P1011 + 0.8*P1100 + 0.5*P1101 + 0.1*P1111
P2111 == 0.5*P1011 + 0.4*P1101 + 0.9*P1111
P1000 == 1*P2000 + 0.5*P2001
P1001 == 0.5*P2001 + 0.8*P2100 + 0.4*P2101
P1011 == 0.4*P2101 + 0.4*P2111
P1100 == 0.2*P2100 + 0.1*P2101
P1101 == 0.1*P2101 + 0.1*P2111
P1111 == 0.5*P2111
P2000 + P2001 + P2011 + P2100 + P2101 + P2111 + P1000 + P1001 + P1011 + P1100 + P1101 + P1111 == 1
Find(P2000, P2001, P2011, P2100, P2101, P2111, P1000, P1001, P1011, P1100, P1101, P1111) = [0; 0; 0; 0.0965418; 0.227404; 0.176054; 0; 0.168195; 0.161383; 0.0420487; 0.0403458; 0.0880272]
