P2000 := 0
P2001 := 0
P2010 := 0
P2011 := 0
P2110 := 0
P2111 := 0
P2210 := 0
P2211 := 0
P1000 := 0
P1001 := 0
P1010 := 0
P1011 := 0
P1111 := 0
P1210 := 0
P1211 := 0
P1110 := 0
Given
P2000 == 0
P2001 == 0
P2010 == P1000 + P1001*0.6
P2011 == P1001*0.4 + P1010*0.6 + P1011*0.6
P2110 == P1010*0.4 + P1011*0.24
P2111 == P1011*0.16 + P1111*0.6 + P1110*0.6
P2210 == P1111*0.24 + P1210*0.4 + P1211*0.24 + P1110*0.4
P2211 == P1111*0.16 + P1210*0.6 + P1211*0.76
P1000 == P2000 + P2001*0.6
P1001 == P2001*0.4 + P2010*0.6 + P2011*0.6
P1010 == P2010*0.4 + P2011*0.24
P1011 == P2011*0.16 + P2110*0.6 + P2111*0.6
P1111 == P2111*0.16 + P2210*0.6 + P2211*0.6
P1210 == P2210*0.4 + P2211*0.24
P1211 == P2211*0.16
P1110 == P2110*0.4 + P2111*0.6
P2000 + P2001 + P2010 + P2011 + P2110 + P2111 + P2210 + P2211 + P1000 + P1001 + P1010 + P1011 + P1111 + P1210 + P1211 + P1110 == 1
Minerr(P2000, P2001, P2010, P2011, P2110, P2111, P2210, P2211, P1000, P1001, P1010, P1011, P1111, P1210, P1211, P1110) = [-0.00111523; -0.00111962; 0.0952282; 0.18385; 0.0582831; 0.0912381; 0.0478059; 0.0179066; -0.00297948; 0.165796; 0.0806531; 0.117395; 0.0510505; 0.0207023; 0.000147403; 0.075081]
2
